# OpenSim document version 30000
ForceSet Wu_model_with_box:
  defaults: CoordinateActuator default: optimal_force=2
  CoordinateActuator pelvis_rz: coordinate=pelvis_tilt optimal_force=300
  CoordinateActuator pelvis_rx: coordinate=pelvis_list optimal_force=300
  CoordinateActuator pelvis_ry: coordinate=pelvis_rotation optimal_force=300
  CoordinateActuator pelvis_tx: coordinate=pelvis_tx optimal_force=300
  CoordinateActuator pelvis_ty: coordinate=pelvis_ty optimal_force=300
  CoordinateActuator pelvis_tz: coordinate=pelvis_tz optimal_force=300
  # RESIDUAL ACTUATORS
